*Heading
** Job name: beam2d Model name: Model-1
** Generated by: Abaqus/CAE 2019
*Preprint, echo=NO, model=NO, history=NO, contact=NO
**
** PARTS
**
*Part, name=Part-1
*Node
      1,           0.,           0.,           0.
      2, 0.0199999996,           0.,           0.
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*Element, type=S4R
  1,   1,   2,  53,  52
  2,   2,   3,  54,  53
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*Nset, nset=_PickedSet2, internal, generate
   1,  306,    1
*Elset, elset=_PickedSet2, internal, generate
   1,  250,    1
** Section: Section-1
*Shell Section, elset=_PickedSet2, material=Material-Steel
0.02, 5
*End Part
**
**
** ASSEMBLY
**
*Assembly, name=Assembly
**
*Instance, name=Part-1-1, part=Part-1
*End Instance
**
*Nset, nset=_PickedSet4, internal, instance=Part-1-1, generate
   1,  256,   51
*Elset, elset=_PickedSet4, internal, instance=Part-1-1, generate
   1,  201,   50
*End Assembly
**
** MATERIALS
**
*Material, name=Material-Steel
*Density
7850.,
*Elastic
 2.1e+11, 0.3
**
** BOUNDARY CONDITIONS
**
** Name: BC-1 Type: Symmetry/Antisymmetry/Encastre
*Boundary
_PickedSet4, ENCASTRE
** ----------------------------------------------------------------
**
** STEP: Step-1
**
*Step, name=Step-1, nlgeom=NO, perturbation
*Frequency, eigensolver=Lanczos, sim, acoustic coupling=on, normalization=mass
20, , , , ,
**
** OUTPUT REQUESTS
**
*Restart, write, frequency=0
**
** FIELD OUTPUT: F-Output-1
**
*Output, field, variable=PRESELECT
*End Step
