*Heading
** Job name: beam-3d Model name: Model-1
** Generated by: Abaqus/CAE 2019
*Preprint, echo=NO, model=NO, history=NO, contact=NO
**
** PARTS
**
*Part, name=Part-1
*Node
      1,           1.,  0.100000001, 0.0199999996
      2,           1., 0.0799999982, 0.0199999996
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*Element, type=C3D8R
   1,   37,   38,   44,   43,    1,    2,    8,    7
   2,   38,   39,   45,   44,    2,    3,    9,    8
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*Nset, nset=_PickedSet2, internal, generate
    1,  1836,     1
*Elset, elset=_PickedSet2, internal, generate
    1,  1250,     1
** Section: Section-1
*Solid Section, elset=_PickedSet2, material=Material-Steel
,
*End Part
**
**
** ASSEMBLY
**
*Assembly, name=Assembly
**
*Instance, name=Part-1-1, part=Part-1
*End Instance
**
*Nset, nset=_PickedSet4, internal, instance=Part-1-1, generate
 1801,  1836,     1
*Elset, elset=_PickedSet4, internal, instance=Part-1-1, generate
 1226,  1250,     1
*End Assembly
**
** MATERIALS
**
*Material, name=Material-Steel
*Density
7850.,
*Elastic
 2.1e+11, 0.3
** ----------------------------------------------------------------
**
** STEP: Step-1
**
*Step, name=Step-1, nlgeom=NO, perturbation
*Frequency, eigensolver=Lanczos, sim, acoustic coupling=on, normalization=mass
20, , , , ,
**
** BOUNDARY CONDITIONS
**
** Name: BC-1 Type: Symmetry/Antisymmetry/Encastre
*Boundary
_PickedSet4, ENCASTRE
**
** OUTPUT REQUESTS
**
*Restart, write, frequency=0
**
** FIELD OUTPUT: F-Output-1
**
*Output, field, variable=PRESELECT
*End Step
