*Heading
** Job name: Job-cylinder Model name: Model-1
** Generated by: Abaqus/CAE 6.14-2
*Preprint, echo=NO, model=NO, history=NO, contact=NO
**
** PARTS
**
*Part, name=Part-1
*Node
      1,  0.995030761, -0.0995678455,           4.
      2,  0.980172515,  -0.19814615,           4.
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*Element, type=S4R
   1,   63,    1,   64,  126
   2,    1,    2,   65,   64
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*Nset, nset=_PickedSet2, internal, generate
    1,  2583,     1
*Elset, elset=_PickedSet2, internal, generate
    1,  2520,     1
** Section: Section-1
*Shell Section, elset=_PickedSet2, material=Material-steel
0.01, 5
*End Part
**
**
** ASSEMBLY
**
*Assembly, name=Assembly
**
*Instance, name=Part-1-1, part=Part-1
*End Instance
**
*End Assembly
**
** MATERIALS
**
*Material, name=Material-steel
*Density
7800.,
*Elastic
 2.1e+11, 0.3
** ----------------------------------------------------------------
**
** STEP: Step-1
**
*Step, name=Step-1, nlgeom=NO, perturbation
*Frequency, eigensolver=Lanczos, acoustic coupling=on, normalization=displacement
40, , , , ,
**
** OUTPUT REQUESTS
**
*Restart, write, frequency=0
**
** FIELD OUTPUT: F-Output-1
**
*Output, field, variable=PRESELECT
*End Step
